// SBML level 2 version 4

function Constant_flux__irreversible(v)
  v;
end
Constant_flux__irreversible is "Constant flux (irreversible)";

model New_Model()

  // Compartments:
  compartment compartment = 1;

  // Species:
  substanceOnly species X in compartment = 2;
  substanceOnly species Y in compartment = 10;

  // Parameters:
  A = 1;
  B = 4;

  // Reactions:
  r2_id: Y + 2 X => 3 X; compartment*r2_id_k1*X^2*Y; r2_id is "r2_name";
    r2_id_k1 = 2;
  r3_id: X => Y; compartment*B*X; r3_id is "r3_name";
  r4_id: X => ; compartment*r4_id_k1*X; r4_id is "r4_name";
    r4_id_k1 = 1;
  r1_id: => X; compartment*Constant_flux__irreversible(A); r1_id is "r1_name";

  // Unit definitions:
  unit length = metre;
  unit area = metre^2;
  unit volume = litre;
  unit time = second;
  unit substance = mole;
end
